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# Det anbefales at læse databladet for LM26003 s. 18 og frem sammen med disse udregninger. (../Datablade/lm26003.pdf)
# Til dette design skal følgende parametre bestemmes: VOUT, VIN min, VIN max, Iout max, fsw, fbw
# Output voltage:
Vfb := 1.235 V
VOUT := 5 V
R2 == R1/(Vout/Vfb - 1) solve, Vout → 1.235*V*(R1/R2 + 1.0)
R2 + R1 ≤ 150*kΩ
R1 := 82 kΩ
R2 := 27 kΩ
VOUT := 1.235*V*(R1/R2 + 1.0) = 4.98574 V
# Inductor:
VIN := 7.2 V
fsw := 100 kHz
Iripple := 5%*2 A = 100 mA
L_min := (VIN - VOUT)*VOUT/(fsw*Iripple*VIN) = 153.329 μH
# Output capacitor C7:
ΔVt := 0.3 V
ΔIt := 1 A  # Skud fra hoften
Re_max := ΔVt/ΔIt = 0.3 Ω
Re := 0.063 Ω  # ESR
C_min := L*(ΔVt - sqrt(ΔVt^2 - (ΔIt*Re)^2))/(VOUT*Re^2) = 338.056 μF*m*s^2*A^2/kg
C_out := 100 μF
# Input capacitor:
I_load := 2 A
I_rms := I_load*sqrt(VOUT*(VIN - VOUT))/VIN = 922.947 mA
C_10 := 100 μF
C_9 := 10 μF
# Bootstrap:
Cboot := 50 nF
# Catch diode:
Iload := 2 A
I_D.avg := Iload*(1 - VOUT/(8.2 V)) = 783.966 mA
# Feedback transfer function / compensation:
fz := 1/(2*π*Re*C_10) = 25.2627 kHz
fp := 1/(20*π*VOUT/(2 A)*C_10) + 0.5/(2*π*L_min*fsw*C_10) = 115.744 Hz
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fn := fsw/2 = 50 kHz
B := 3.3 V/V
gm := 675*10^-6*S
# fra databladet, typical.
# 400-1000 ellers
R3 := B/gm*((R1 + R2)/R2) = 19.7366 kΩ
R1 = 82000 Ω
fp_MAX := 1000 Hz
fp_MIN := 100 Hz
C5 := 1/(2*π*fp_MAX*R3) = 8.06394 nF
C4 := 1/(2*π*fz*R3) = 319.204 pF  # Behøves måske ikke, mindsker støj
# Kerne data fundet i Epcos_ETD29_16_10.pdf:
gap := 0.5 mm
L_min = 0.000153329 H
A_L := 200*10^-9*H*95%  # per vinding
sqrt(0.7 mm^2/π) = 472.035 μm
N_primær := 29
N_sekundær := round(N_primær*3.4 V/(VOUT + 0.4 V)) = 18
viklebredde := 28 mm
L_primær := N_primær^2*A_L = 0.00015979 H
VOUT_3V := (VOUT + 0.4 V)*N_sekundær/N_primær = 3.34287 V
A_e := 234
[m^2]
L_e := 97
[m]
μ_i := 2200
A_L := 1439
L_g := (4*π*A_e/A_L) - (L_e/μ_i) = 1.99936
[mm]  # total spalte
# Genberegninger af udgangsskondensator og diode for 3V udgangen:
# Catch diode:
Iload := 2 A
I_D.avg := Iload*(1 - VOUT/(8.2 V)) = 783.966 mA
# Output capacitor C12:
ΔVt := 0.2 V
ΔIt := 20 mA  # Skud fra hoften
Re_max := ΔVt/ΔIt = 10 Ω
Re := 0.063 Ω  # ESR
L := N_sekundær^2*1439*10^-9*H*75% = 0.000349677 H
C_min3V := L*(ΔVt - sqrt(ΔVt^2 - (ΔIt*Re)^2))/(VOUT_3V*Re^2) = 0.104605 μF
C_out3V := 100 μF
# Vikling af spole/transformer
N_primær = 29
N_sekundær = 18
20 mm*π*29 = 1.82212 m
20 mA/((0.4 mm/2)^2*π) = 0.159155 A/mm^2
20 mA/(0.4 mm^2) = 0.05 A/mm^2
0.183 Ω/15 = 0.0122 Ω
0.151 Ω/18 = 0.00838889 Ω
